units real
atom_style full

boundary p p p

pair_style lj/cut/coul/long 12.0

pair_modify mix geometric

kspace_style pppm 1e-05

bond_style harmonic
angle_style harmonic
dihedral_style zero nocoeff
improper_style harmonic

special_bonds lj/coul 0.0 0.0 0.0

read_data equilibrated.data

neighbor 2.0 bin
neigh_modify every 1 delay 0 check yes

timestep 0.25

thermo_style custom step temp pe ke etotal ebond eangle edihed eimp evdwl press


log production.log

reset_timestep 0

fix 1 all nvt temp 300.0 300.0 100.0

thermo 100

dump 1 all custom 100 production.xyz id type x y z

dump_modify 1 sort id

restart 1000 production.restart

run 4000000

unfix 1
