# Phase 0 — BN-like scaffold + 30,000 confined waters
# Extended contained 300 K hold
# Corrective protocol after open-boundary axial water loss.
#
# Rationale:
# - Input topology is valid.
# - The failed molecule was near zlo, outside the nominal axial tube segment.
# - This run uses rigid water and reflective finite-box boundaries to prevent atom loss.

units           real
atom_style      full
boundary        f f f

pair_style      lj/cut/coul/cut 10.0
bond_style      harmonic
angle_style     harmonic

read_data       ../../../systems/inorganic/bn_like_scaffold_water/outputs/bn_like_scaffold_water_30000w_nvt300_hold.data

group           scaffold type 1 2
group           water type 3 4

mass            1 10.811
mass            2 14.007
mass            3 15.9994
mass            4 1.008

pair_coeff      1 1 0.0500 3.40
pair_coeff      2 2 0.0500 3.40
pair_coeff      1 2 0.0500 3.40
pair_coeff      3 3 0.1521 3.1507
pair_coeff      4 4 0.0000 0.0000
pair_coeff      1 3 0.0872 3.275
pair_coeff      2 3 0.0872 3.275
pair_coeff      1 4 0.0000 0.0000
pair_coeff      2 4 0.0000 0.0000
pair_coeff      3 4 0.0000 0.0000

bond_coeff      1 450.0 0.9572
angle_coeff     1 55.0 104.52

neighbor        2.0 bin
neigh_modify    every 1 delay 0 check yes one 4000 page 400000

fix             freeze_scaffold scaffold setforce 0.0 0.0 0.0
velocity        scaffold set 0.0 0.0 0.0

# Finite-box reflective boundaries to prevent atom loss in non-periodic directions.
fix             box_wall all wall/reflect xlo EDGE xhi EDGE ylo EDGE yhi EDGE zlo EDGE zhi EDGE

# Rigid water geometry for stable 300 K dynamics.
fix             shake_water water shake 1.0e-5 100 0 b 1 a 1

compute         twater water temp
compute         msdwater water msd

fix             nvt_water water nvt temp 300.0 300.0 100.0
fix_modify      nvt_water temp twater

reset_timestep  0
timestep        0.10

thermo          500
thermo_style    custom step atoms temp c_twater pe ke etotal press c_msdwater[4]

dump            dmp all custom 1000 ../../../systems/inorganic/bn_like_scaffold_water/outputs/nvt300_hold_extended_contained_30000w.lammpstrj id type mol q x y z
dump_modify     dmp sort id

run             20000

write_data      ../../../systems/inorganic/bn_like_scaffold_water/outputs/bn_like_scaffold_water_30000w_nvt300_hold_extended_contained.data
