# Phase 0 — BN-like scaffold + confined water short NVT test
# System: 30,000 confined water molecules
# Purpose: test finite-temperature stability after relaxation/minimization.
# Temperature: 50 K
# Scaffold remains fixed.

units           real
atom_style      full
boundary        f f f

pair_style      lj/cut/coul/cut 10.0
bond_style      harmonic
angle_style     harmonic

read_data       ../../../systems/inorganic/bn_like_scaffold_water/outputs/bn_like_scaffold_water_30000w_post_relax_minimized.data

group           scaffold type 1 2
group           water type 3 4

mass            1 10.811
mass            2 14.007
mass            3 15.9994
mass            4 1.008

pair_coeff      1 1 0.0500 3.40
pair_coeff      2 2 0.0500 3.40
pair_coeff      1 2 0.0500 3.40
pair_coeff      3 3 0.1521 3.1507
pair_coeff      4 4 0.0000 0.0000
pair_coeff      1 3 0.0872 3.275
pair_coeff      2 3 0.0872 3.275
pair_coeff      1 4 0.0000 0.0000
pair_coeff      2 4 0.0000 0.0000
pair_coeff      3 4 0.0000 0.0000

bond_coeff      1 450.0 0.9572
angle_coeff     1 55.0 104.52

neighbor        2.0 bin
neigh_modify    every 1 delay 0 check yes

# Keep scaffold fixed.
fix             freeze_scaffold scaffold setforce 0.0 0.0 0.0
velocity        scaffold set 0.0 0.0 0.0

# Water-only dynamics.
timestep        0.25

velocity        water create 50.0 24680 mom yes rot yes dist gaussian

fix             water_nvt water nvt temp 50.0 50.0 25.0

thermo          100
thermo_style    custom step atoms temp pe ke etotal press

dump            dmp all custom 1000 ../../../systems/inorganic/bn_like_scaffold_water/outputs/nvt50_30000w.lammpstrj id type mol q x y z
dump_modify     dmp sort id

run             10000

unfix           water_nvt

write_data      ../../../systems/inorganic/bn_like_scaffold_water/outputs/bn_like_scaffold_water_30000w_nvt50.data
